**
** Heading +++++++++++++++++++++++++++++++++++++++++++++++++
**
*Heading
Hash: wqFXLvsm, Date: 09/04/2025, Unit system: MM_TON_S_C
**
** Nodes +++++++++++++++++++++++++++++++++++++++++++++++++++
**
*Node
1, 8.22000000E-001, 3.92500000E-001, 0.00000000E+000
2, 8.22000000E-001, 3.92500000E-001, 1.00000000E-003
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**
** Elements ++++++++++++++++++++++++++++++++++++++++++++++++
**
*Element, Type=C3D10, Elset=Solid_part-2
4961, 11717, 12723, 12586, 12676, 19579, 18402, 19580, 19581, 18405, 18262
4962, 12720, 12818, 12748, 11825, 18700, 18699, 18482, 19582, 19583, 19584
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*Element, Type=C3D10, Elset=Solid_part-1
1, 1193, 503, 249, 502, 4314, 6230, 6245, 4313, 4312, 6231
2, 110, 363, 364, 1285, 3686, 3685, 3687, 6246, 4665, 4664
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**
** Node sets +++++++++++++++++++++++++++++++++++++++++++++++
**
*Nset, Nset=Nchtnodes
1, 2, 3, 4, 5, 6
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*Nset, Nset=Internal_Selection-1_Brood_Temperature
10933, 10934, 10935, 10936, 10937, 10938
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*Nset, Nset=Internal_Selection-1_Solid_Temperature
1, 2, 3, 4, 5, 6
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*Nset, Nset=solidchtnodes
1, 2, 3, 4, 5, 6
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*Nset, Nset=broodchtnodes
10933, 10934, 10935, 10936, 10937, 10938
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*Nset, Nset=Internal-1_Brood_Fluid_Elems
10933, 10934, 10935, 10936, 10937, 10938
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**
** Element sets ++++++++++++++++++++++++++++++++++++++++++++
**
*Elset, Elset=chtElems
1, 2, 3, 7, 13, 22
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*Elset, Elset=Internal-1_Brood_Fluid_Elems_S4
4986, 4987, 5009, 5043, 5049, 5089
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*Elset, Elset=Internal-1_Brood_Fluid_Elems_S1
5033, 5084, 5139, 5150, 5220, 5244
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*Elset, Elset=Internal-1_Brood_Fluid_Elems_S3
5049, 5342, 5381, 5442, 5463, 5501
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*Elset, Elset=Internal-1_Brood_Fluid_Elems_S2
5194, 5248, 5338, 5383, 5384, 5436
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*Elset, Elset=Internal-1_flux_interface_S3
1, 7, 36, 52, 55, 99
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*Elset, Elset=Internal-1_flux_interface_S1
2, 22, 26, 34, 52, 65
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*Elset, Elset=Internal-1_flux_interface_S4
3, 13, 25, 33, 50, 56
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*Elset, Elset=Internal-1_flux_interface_S2
77, 170, 235, 281, 377, 406
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**
** Surfaces ++++++++++++++++++++++++++++++++++++++++++++++++
**
*Surface, Name=Brood_Fluid_Elems, Type=Element
Internal-1_Brood_Fluid_Elems_S4, S4
Internal-1_Brood_Fluid_Elems_S1, S1
Internal-1_Brood_Fluid_Elems_S3, S3
Internal-1_Brood_Fluid_Elems_S2, S2
** Name: Brood_Fluid_Nodes: Deactivated
*Surface, Name=Sflux_interface, Type=Element
Internal-1_flux_interface_S3, S3
Internal-1_flux_interface_S1, S1
Internal-1_flux_interface_S4, S4
Internal-1_flux_interface_S2, S2
**
** Physical constants ++++++++++++++++++++++++++++++++++++++
**
**
** Coordinate systems ++++++++++++++++++++++++++++++++++++++
**
**
** Materials +++++++++++++++++++++++++++++++++++++++++++++++
**
*MATERIAL, NAME=Solid
*CONDUCTIVITY
0.120e-3
*ELASTIC
25e6, 0.10
*EXPANSION
7.0e-4
*DENSITY
420e-9
*SPECIFIC HEAT
1530e6
*MATERIAL, NAME=Brood
*CONDUCTIVITY
0.340e-3
*ELASTIC
1.0e6, 0.30
*EXPANSION
1.0e-4
*SPECIFIC HEAT
3526e6
*DENSITY
733.5e-9
**
** Sections ++++++++++++++++++++++++++++++++++++++++++++++++
**
*Solid section, Elset=Solid_part-1, Material=Solid
*Solid section, Elset=Solid_part-2, Material=Brood
**
** Pre-tension sections ++++++++++++++++++++++++++++++++++++
**
**
** Constraints +++++++++++++++++++++++++++++++++++++++++++++
**
**
** Surface interactions ++++++++++++++++++++++++++++++++++++
**
**
** Contact pairs +++++++++++++++++++++++++++++++++++++++++++
**
**
** Amplitudes ++++++++++++++++++++++++++++++++++++++++++++++
**
**
** Initial conditions ++++++++++++++++++++++++++++++++++++++
**
** Name: Brood_Temperature
*Initial conditions, Type=Temperature
Internal_Selection-1_Brood_Temperature, 294.15
** Name: Solid_Temperature
*Initial conditions, Type=Temperature
Internal_Selection-1_Solid_Temperature, 283.15
**
** Steps +++++++++++++++++++++++++++++++++++++++++++++++++++
**

** Step-1 ++++++++++++++++++++++++++++++++++++++++++++++++++
**

*STEP, INC=200000, nlgeom=NO
*HEAT TRANSFER, DIRECT
0.1,21600.0
**
** Controls ++++++++++++++++++++++++++++++++++++++++++++++++
**
**
** Output frequency ++++++++++++++++++++++++++++++++++++++++
**
*Output, Frequency=1
**
** Boundary conditions +++++++++++++++++++++++++++++++++++++
**
*Boundary, op=New
** Name: B_Temperature
*Boundary
broodchtnodes, 11, 11, 0.0
** Name: S_Temperature
*Boundary
solidchtnodes, 11, 11, 0.0
**
** Loads +++++++++++++++++++++++++++++++++++++++++++++++++++
**
**
** Defined fields ++++++++++++++++++++++++++++++++++++++++++
**
**
** History outputs +++++++++++++++++++++++++++++++++++++++++
**
**
** Field outputs +++++++++++++++++++++++++++++++++++++++++++
**
*Node file
NT
**
** End step ++++++++++++++++++++++++++++++++++++++++++++++++
**
*End step
